# Worksheet setting: ORIGIN = 1
Norm(μ, σ, x) := 1/(σ*sqrt(2*π))*e^(-(x - μ)^2/(2*σ^2))
NormV(μ_x, μ_y, σ_x, σ_y, r, x, y) := 1/(2*π*σ_x*σ_y*sqrt(1 - r^2))*e^(-1/(2*(1 - r^2))*((x - μ_x)^2/σ_x^2 - 2*r*(x - μ_x)*(y - μ_y)/(σ_x*σ_y) + (y - μ_y)^2/σ_y^2))
f_1(y) := Norm(μ_1, σ_1, y)
f_2(y) := Norm(μ_2, σ_2, y)
f_3(y) := Norm(μ_3, σ_3, y)
f_4(y) := Norm(μ_4, σ_4, y)
f_kb1(k, b) := f_2(k*x_2 + b)*f_1(k*x_1 + b)
f_kb2(k, b) := f_4(k*x_4 + b)*f_3(k*x_3 + b)
f_t(x, y) := integral(integral(f_kb1(k_1, y - k_1.*x)*f_kb2(k_2, y - k_2*x), k_1 = -∞ .. ∞), k_2 = -∞ .. ∞)
f_t(x, y) := integral(f_2(k_2, y - k_2*x)*integral(f_1(k_1, y - k1*x), k_1 = -∞ .. ∞), k_2 = -∞ .. ∞)
f_kb1(k_1, y - k_1*x) := e^(-(y - k_1*x - μ_1 + k_1*x_1)^2/(2*σ_1^2))*e^(-(y - k_1*x - μ_2 + k_1*x_2)^2/(2*σ_2^2))/(2*π*σ_1*σ_2)
[C_m; B_m; A_m] := -(y - k_1*x - μ_1 + k_1*x_1)^2/(2*σ_1^2) - (y - k_1*x - μ_2 + k_1*x_2)^2/(2*σ_2^2) coeffs, k_1; simplify →
-A_m > 0 → (σ_1^2*x^2 - 2*σ_1^2*x*x_2 + σ_1^2*x_2^2 + σ_2^2*x^2 - 2*σ_2^2*x*x_1 + σ_2^2*x_1^2)/(2*σ_1^2*σ_2^2) > 0
1/(2*π*σ_1*σ_2)*sqrt(π/A)*e^((B^2 - 4 A*C)/(4 A)) substitute, A == -A_m, B == -B_m, C == -C_m → sqrt(2)*e^(-(μ_1*x - μ_2*x - μ_1*x_2 + μ_2*x_1 - x_1*y + x_2*y)^2/(2*σ_1^2*x^2 - 4*σ_1^2*x*x_2 + 2*σ_1^2*x_2^2 + 2*σ_2^2*x^2 - 4*σ_2^2*x*x_1 + 2*σ_2^2*x_1^2))*sqrt(σ_1^2*σ_2^2/(σ_1^2*x^2 - 2*σ_1^2*x*x_2 + σ_1^2*x_2^2 + σ_2^2*x^2 - 2*σ_2^2*x*x_1 + σ_2^2*x_1^2))/(2*sqrt(π)*σ_1*σ_2)
integral(f_kb1(k_1, y - k1*x), k_1 = -∞ .. ∞) := e^(-(x*(μ_1 - μ_2) + x_1*(μ_2 - y) + x_2*(y - μ_1))^2/(2*(σ_1^2*(x - x_2)^2 + σ_2^2*(x - x_1)^2)))/(sqrt(2*π)*sqrt(σ_1^2*(x - x_2)^2 + σ_2^2*(x - x_1)^2))
σ'_1(x) := sqrt(σ_1^2*(x - x_2)^2 + σ_2^2*(x - x_1)^2)
integral(f_1(k_1, y - k1*x), k_1 = -∞ .. ∞) := 1/(sqrt(2*π)*σ'_1(x))*e^(-(x*(μ_1 - μ_2) + x_1*(μ_2 - y) + x_2*(y - μ_1))^2/(2*σ'_1(x)^2))
σ'_2(x) := sqrt(σ_3^2*(x - x_4)^2 + σ_4^2*(x - x_3)^2)
integral(f_2(k_2, y - k_2.*x), k_2 = -∞ .. ∞) := 1/(sqrt(2*π)*σ'_2(x))*e^(-(x*(μ_3 - μ_4) + x_3*(μ_4 - y) + x_4*(y - μ_3))^2/(2*σ'_2(x)^2))
f_t(x, y) := 1/(2*π*σ'_1(x)*σ'_2(x))*e^(-((x*(μ_1 - μ_2) + y*(x_2 - x_1) + x_1*μ_2 - x_2*μ_1)^2/(2*σ'_1(x)^2) + (x*(μ_3 - μ_4) + y*(x_4 - x_3) + x_3*μ_4 - x_4*μ_3)^2/(2*σ'_2(x)^2)))
# Аффинное преобразование от целевых координат к координатам облака рассеивания:
M := [μ_1 - μ_2, x_2 - x_1; μ_3 - μ_4, x_4 - x_3]
b := [x_1*μ_2 - x_2*μ_1; x_3*μ_4 - x_4*μ_3]
[x'; y'] := M*[x; y] + b
J := |M|  # disabled
# Матрица обратного преобразования
b' := [(M[1, 2]*b[2] - M[2, 2]*b[1])/J; (M[2, 1]*b[1] - M[1, 1]*b[2])/J]
M' := [M[2, 2]/J, -M[1, 2]/J; -M[2, 1]/J, M[1, 1]/J]
M' → [-(x_3 - x_4)/J, (x_1 - x_2)/J; -(μ_3 - μ_4)/J, (μ_1 - μ_2)/J]
b' → [
    -((x_3 - x_4)*(μ_1*x_2 - μ_2*x_1) - (x_1 - x_2)*(μ_3*x_4 - μ_4*x_3))/J;
    -((μ_3 - μ_4)*(μ_1*x_2 - μ_2*x_1) - (μ_1 - μ_2)*(μ_3*x_4 - μ_4*x_3))/J
]
# Матрица Якоби обратного преобразования
# Выразим функцию осей фигуры в координатах центра эллипса
[x''; y''] := M'*[x'_d; y'_d] + b'
σ''_1(x_d, y_d) := σ'_1(x) substitute, x == x''; explicit →
σ''_1(x_d, y_d) → sqrt(σ_1^2*(x_2 + ((x_3 - x_4)*(μ_1*x_2 - μ_2*x_1) - (x_1 - x_2)*(μ_3*x_4 - μ_4*x_3))/J + x'_d*(x_3 - x_4)/J - y'_d*(x_1 - x_2)/J)^2 + σ_2^2*(x_1 + ((x_3 - x_4)*(μ_1*x_2 - μ_2*x_1) - (x_1 - x_2)*(μ_3*x_4 - μ_4*x_3))/J + x'_d*(x_3 - x_4)/J - y'_d*(x_1 - x_2)/J)^2)
σ''_1(x_d, y_d)*|J| := σ_1^2*(x_2*|J| + (x_3 - x_4)*(μ_1*x_2 - μ_2*x_1) - (x_1 - x_2)*(μ_3*x_4 - μ_4*x_3) + x'_d*(x_3 - x_4) - y'_d*(x_1 - x_2))^2 + σ_2^2*(x_1*|J| - (x_3 - x_4)*(μ_1*x_2 - μ_2*x_1) - (x_1 - x_2)*(μ_3*x_4 - μ_4*x_3) - x'_d*(x_3 - x_4) + y'_d*(x_1 - x_2))^2
σ''_2(x_d, y_d) := σ'_2(x) substitute, x == x''; explicit →
σ''_2(x_d, y_d) → sqrt(σ_3^2*(x_4 + ((x_3 - x_4)*(μ_1*x_2 - μ_2*x_1) - (x_1 - x_2)*(μ_3*x_4 - μ_4*x_3))/J + x'_d*(x_3 - x_4)/J - y'_d*(x_1 - x_2)/J)^2 + σ_4^2*(x_3 + ((x_3 - x_4)*(μ_1*x_2 - μ_2*x_1) - (x_1 - x_2)*(μ_3*x_4 - μ_4*x_3))/J + x'_d*(x_3 - x_4)/J - y'_d*(x_1 - x_2)/J)^2)
σ''_2(x_d, y_d)*|J| := σ_3^2*((x_4*|J| + (x_3 - x_4)*(μ_1*x_2 - μ_2*x_1) - (x_1 - x_2)*(μ_3*x_4 - μ_4*x_3) + x'_d*(x_3 - x_4)) - y'_d*(x_1 - x_2))^2 + σ_4^2*(x_3*|J| + (x_3 - x_4)*(μ_1*x_2 - μ_2*x_1) - (x_1 - x_2)*(μ_3*x_4 - μ_4*x_3) + x'_d*(x_3 - x_4) - y'_d*(x_1 - x_2))^2
